# OpenSim document version 40000
MarkerSet:
  Marker neck: torso (0.003155 0.3715 0)
  Marker right_shoulder: torso (0.003155 0.3715 0.17)
  Marker left_shoulder: torso (0.003155 0.3715 -0.17)
  Marker right_hip: pelvis (-0.020276 -0.07849 0.09476)
  Marker left_hip: pelvis (-0.020276 -0.07849 -0.09476)
  Marker midHip: pelvis (-0.020276 -0.07849 0)
  Marker right_knee: tibia_r (-0.00808954 -0.0035348 -0.00148474)
  Marker left_knee: tibia_l (-0.00808954 -0.0035348 0.00148474)
  Marker right_ankle: tibia_r (-0.014 -0.38 0.0075)
  Marker left_ankle: tibia_l (-0.014 -0.38 -0.0075)
  Marker right_heel: calcn_r (0.01820599 0.01 -0.02024674)
  Marker left_heel: calcn_l (0.01820599 0.01 0.02024674)
  Marker right_small_toe: calcn_r (0.200266 3.68629e-17 0.0404935)
  Marker left_small_toe: calcn_l (0.200266 3.68629e-17 -0.0404935)
  Marker right_big_toe: calcn_r (0.227575 3.59955e-17 -0.0151851)
  Marker left_big_toe: calcn_l (0.227575 3.59955e-17 0.0151851)
  Marker right_elbow: humerus_r (0.013144 -0.286273 -0.009595)
  Marker left_elbow: humerus_l (0.013144 -0.286273 0.009595)
  Marker right_wrist: hand_r (0 0 0)
  Marker left_wrist: hand_l (0 0 0)
