# OpenSim document version 40000
InverseKinematicsTool generic:
  constraint_weight: Inf
  accuracy: 1e-5
  time_range: -Inf Inf
  report_errors: true
  report_marker_locations: false
  IKTaskSet:
    IKMarkerTask neck: apply=true weight=5
    IKMarkerTask right_shoulder: apply=true weight=5
    IKMarkerTask left_shoulder: apply=true weight=5
    IKMarkerTask right_hip: apply=true weight=25
    IKMarkerTask left_hip: apply=true weight=25
    IKMarkerTask midHip: apply=true weight=25
    IKMarkerTask right_knee: apply=true weight=30
    IKMarkerTask right_ankle: apply=true weight=30
    IKMarkerTask right_small_toe: apply=true weight=30
    IKMarkerTask right_big_toe: apply=true weight=30
    IKMarkerTask right_heel: apply=true weight=60
    IKMarkerTask left_knee: apply=true weight=30
    IKMarkerTask left_ankle: apply=true weight=30
    IKMarkerTask left_small_toe: apply=true weight=30
    IKMarkerTask left_big_toe: apply=true weight=30
    IKMarkerTask left_heel: apply=true weight=60
    IKMarkerTask right_elbow: apply=true weight=5
    IKMarkerTask left_elbow: apply=true weight=5
    IKMarkerTask right_wrist: apply=true weight=5
    IKMarkerTask left_wrist: apply=true weight=5
