# OpenSim document version 40000
ScaleTool LaiUhlrich2022:
  mass: 75.337 [kg]
  height: 1.89
  age: -1
  ModelScaler:
    apply: true
    scaling_order: measurements
    time_range: 3.41 3.66
    preserve_mass_distribution: true
    MeasurementSet:
      Measurement foot: apply=true
        MarkerPair: markers=(right_heel right_small_toe)
        MarkerPair: markers=(right_heel right_big_toe)
        MarkerPair: markers=(left_heel right_small_toe)
        MarkerPair: markers=(left_heel left_big_toe)
        BodyScale talus_r: axes=(X Y Z)
        BodyScale calcn_r: axes=(X Y Z)
        BodyScale toes_r: axes=(X Y Z)
        BodyScale talus_l: axes=(X Y Z)
        BodyScale calcn_l: axes=(X Y Z)
        BodyScale toes_l: axes=(X Y Z)
      Measurement tibia_r: apply=true
        MarkerPair: markers=(right_knee right_ankle)
        BodyScale tibia_r: axes=(X Y Z)
      Measurement femur_r: apply=true
        MarkerPair: markers=(right_hip right_knee)
        BodyScale femur_r: axes=(X Y Z)
        BodyScale patella_r: axes=(X Y Z)
      Measurement tibia_l: apply=true
        MarkerPair: markers=(left_knee left_ankle)
        BodyScale tibia_l: axes=(X Y Z)
      Measurement femur_l: apply=true
        MarkerPair: markers=(left_hip left_knee)
        BodyScale femur_l: axes=(X Y Z)
        BodyScale patella_l: axes=(X Y Z)
      Measurement pelvisXYZ: apply=true
        MarkerPair: markers=(right_hip left_hip)
        BodyScale pelvis: axes=(X Y Z)
      Measurement torsoXY: apply=true
        MarkerPair: markers=(right_shoulder right_hip)
        MarkerPair: markers=(left_shoulder left_hip)
        BodyScale torso: axes=(X Y)
      Measurement torsoZ: apply=true
        MarkerPair: markers=(right_shoulder left_shoulder)
        BodyScale torso: axes=Z
      Measurement humerus: apply=true
        MarkerPair: markers=(right_shoulder right_elbow)
        MarkerPair: markers=(left_shoulder left_elbow)
        BodyScale humerus_r: axes=(X Y Z)
        BodyScale humerus_l: axes=(X Y Z)
      Measurement radius: apply=true
        MarkerPair: markers=(left_elbow left_wrist)
        MarkerPair: markers=(right_elbow right_wrist)
        BodyScale ulna_r: axes=(X Y Z)
        BodyScale radius_r: axes=(X Y Z)
        BodyScale hand_r: axes=(X Y Z)
        BodyScale ulna_l: axes=(X Y Z)
        BodyScale radius_l: axes=(X Y Z)
        BodyScale hand_l: axes=(X Y Z)
  MarkerPlacer:
    apply: true
    time_range: 3.41 3.66
    max_marker_movement: -1
    IKTaskSet:
      IKMarkerTask right_hip: apply=true weight=10
      IKMarkerTask left_hip: apply=true weight=10
      IKMarkerTask midHip: apply=true weight=10
      IKMarkerTask right_knee: apply=true weight=10
      IKMarkerTask right_ankle: apply=true weight=10
      IKMarkerTask right_heel: apply=true weight=10
      IKMarkerTask right_small_toe: apply=true weight=10
      IKMarkerTask right_big_toe: apply=true weight=10
      IKMarkerTask left_knee: apply=true weight=10
      IKMarkerTask left_ankle: apply=true weight=10
      IKMarkerTask left_heel: apply=true weight=10
      IKMarkerTask right_small_toe: apply=true weight=10
      IKMarkerTask left_big_toe: apply=true weight=10
      IKMarkerTask right_shoulder: apply=true weight=5
      IKMarkerTask left_shoulder: apply=true weight=5
      IKMarkerTask neck: apply=true weight=5
      IKMarkerTask right_elbow: apply=true weight=1
      IKMarkerTask right_wrist: apply=true weight=5
      IKMarkerTask left_elbow: apply=true weight=1
      IKMarkerTask left_wrist: apply=true weight=5
      IKCoordinateTask [values shared by the 11 below unless stated]: apply=true weight=0.1 value_type=manual_value
          value=0
      IKCoordinateTask hip_flexion_r
      IKCoordinateTask hip_rotation_r: apply=false
      IKCoordinateTask knee_angle_r
      IKCoordinateTask ankle_angle_r: value=0.08726646
      IKCoordinateTask hip_flexion_l
      IKCoordinateTask hip_rotation_l: apply=false
      IKCoordinateTask knee_angle_l
      IKCoordinateTask ankle_angle_l: value=0.08726646
      IKCoordinateTask lumbar_extension
      IKCoordinateTask lumbar_bending
      IKCoordinateTask lumbar_rotation
